*Distribution Table, name=L_Atrium_Table
coord3d, coord3d
*Distribution Table, name=Ventricles_Table
coord3d, coord3d
*Distribution Table, name=R_Atrium_Table
coord3d, coord3d
**
** BOUNDARY CONDITIONS
**
** Name: Compliance-Axial Type: Displacement/Rotation
*Boundary
Compliance-AXIAL, 2, 2
Compliance-AXIAL, 3, 3
Compliance-AXIAL, 4, 4
Compliance-AXIAL, 5, 5
Compliance-AXIAL, 6, 6
** Name: Compliance-Fixed Type: Symmetry/Antisymmetry/Encastre
*Boundary
Compliance-FIXED, ENCASTRE
** Name: Ground Type: Symmetry/Antisymmetry/Encastre
*Boundary
GROUND, ENCASTRE
**
** PREDEFINED FIELDS
**
** Name: Aortic_Arch   Type: Temperature
*Initial Conditions, type=TEMPERATURE
Aortic_Arch-1.ALL_E, -80.
** Name: L_Atrium-Ini   Type: Temperature
*Initial Conditions, type=TEMPERATURE
L_Atrium-1.ALL-NODES, -80.
** Name: Pulmonary_Trunk   Type: Temperature
*Initial Conditions, type=TEMPERATURE
Pulmonary_Trunk-1.ALL_E, -80.
** Name: R_Atrium-Ini   Type: Temperature
*Initial Conditions, type=TEMPERATURE
R_Atrium-1.ALL-NODES, -80.
** Name: Superior_Vena_Cava   Type: Temperature
*Initial Conditions, type=TEMPERATURE
Superior_Vena_Cava-1.ALL_E, -80.
** Name: Ventricles-Ini   Type: Temperature
*Initial Conditions, type=TEMPERATURE
Ventricles-1.ALL-ELS, -80.
**
** INTERACTIONS
**
** Interaction: CAV-AORTA
*Fluid Cavity, name=CAV-AORTA, behavior=Blood, refnode=Aortic_Arch-1.CAV-RP, surface=AORTA-CAV

** Interaction: CAV-ARTERIAL-COMP
*Fluid Cavity, name=CAV-ARTERIAL-COMP, behavior=Blood, refnode=Arterial_Compliance-1.RP, surface=Arterial_Compliance-1.INNER

** Interaction: CAV-LA
*Fluid Cavity, name=CAV-LA, behavior=Blood, refnode=L_Atrium-1.CAV-RP, surface=L_Atrium-1.LA-CAV

** Interaction: CAV-LV
*Fluid Cavity, name=CAV-LV, behavior=Blood, refnode=LV-RP, surface=LV-CAV

** Interaction: CAV-PULMONARY-COMP
*Fluid Cavity, name=CAV-PULMONARY-COMP, behavior=Blood, refnode=Pulmonary_Compliance-1.RP, surface=Pulmonary_Compliance-1.INNER

** Interaction: CAV-PULMONARY_TRUNK
*Fluid Cavity, name=CAV-PULMONARY_TRUNK, behavior=Blood, refnode=Pulmonary_Trunk-1.CAV-RP, surface=Pulmonary_Trunk-1.CAV

** Interaction: CAV-RA
*Fluid Cavity, name=CAV-RA, behavior=Blood, refnode=R_Atrium-1.CAV-RP, surface=R_Atrium-1.RA-CAV

** Interaction: CAV-RV
*Fluid Cavity, name=CAV-RV, behavior=Blood, refnode=RV-RP, surface=RV-CAV

** Interaction: CAV-SVC
*Fluid Cavity, name=CAV-SVC, behavior=Blood, refnode=Superior_Vena_Cava-1.CAV-RP, surface=SVC-CAV

** Interaction: CAV-VENOUS-COMP
*Fluid Cavity, name=CAV-VENOUS-COMP, behavior=Blood, refnode=Venous_Compliance-1.RP, surface=Venous_Compliance-1.INNER

** Interaction: LINK-ARTERIAL-VENOUS
*Fluid Exchange, name=LINK-ARTERIAL-VENOUS, property=Link-Body-Resistance, effective area=441.15
Arterial_Compliance-1.RP, Venous_Compliance-1.RP
** Interaction: LINK-LA-LV
*Fluid Exchange, name=LINK-LA-LV, property=Link-Mitral-Valve, effective area=1039.8
L_Atrium-1.CAV-RP, LV-RP
** Interaction: LINK-LV-ARTERIAL
*Fluid Exchange, name=LINK-LV-ARTERIAL, property=Link-Aortic-Valve, effective area=441.15
LV-RP, Arterial_Compliance-1.RP
** Interaction: LINK-PULMONARY-LA
*Fluid Exchange, name=LINK-PULMONARY-LA, property=Link-Pulmonary-Resistance, effective area=434.9
Pulmonary_Compliance-1.RP, L_Atrium-1.CAV-RP
** Interaction: LINK-RA-RV
*Fluid Exchange, name=LINK-RA-RV, property=Link-Tricuspid-Valve, effective area=1722.2
R_Atrium-1.CAV-RP, RV-RP
** Interaction: LINK-RV-PULMONARY
*Fluid Exchange, name=LINK-RV-PULMONARY, property=Link-Pulmonary-Valve, effective area=434.9
RV-RP, Pulmonary_Compliance-1.RP
** Interaction: LINK-VENOUS-RA
*Fluid Exchange, name=LINK-VENOUS-RA, property=Link-Venous-Resistance, effective area=441.15
Venous_Compliance-1.RP, R_Atrium-1.CAV-RP
** ----------------------------------------------------------------
**
** STEP: PRE-LOAD
**
*Step, name=PRE-LOAD, nlgeom=YES
Preload the structure to 70% diastole
*Dynamic, Explicit
, 0.3
*Bulk Viscosity
0.06, 1.2
*Field, var=1, amp=Time
Ventricles-1.ALL-NODES, 1.0
R_Atrium-1.ALL-NODES, 1.0
L_Atrium-1.ALL-NODES, 1.0
** Mass Scaling: Semi-Automatic
**               Whole Model
*Variable Mass Scaling, dt=2.5e-06, type=below min, frequency=10
**
** BOUNDARY CONDITIONS
**
** Name: Preload-Aortic_Arch Type: Fluid cavity pressure
*Boundary, amplitude=Preload
Aortic_Arch-1.CAV-RP, 8, 8, 0.0005333
** Name: Preload-Arterial-Comp Type: Fluid cavity pressure
*Boundary, amplitude=Preload
Arterial_Compliance-1.RP, 8, 8, 0.01067
** Name: Preload-LA Type: Fluid cavity pressure
*Boundary, amplitude=Preload
L_Atrium-1.CAV-RP, 8, 8, 0.0005333
** Name: Preload-LV Type: Fluid cavity pressure
*Boundary, amplitude=Preload
LV-RP, 8, 8, 0.0005333
** Name: Preload-Pulmonary-Comp Type: Fluid cavity pressure
*Boundary, amplitude=Preload
Pulmonary_Compliance-1.RP, 8, 8, 0.001067
** Name: Preload-Pulmonary_Trunk Type: Fluid cavity pressure
*Boundary, amplitude=Preload
Pulmonary_Trunk-1.CAV-RP, 8, 8, 0.001067
** Name: Preload-RA Type: Fluid cavity pressure
*Boundary, amplitude=Preload
R_Atrium-1.CAV-RP, 8, 8, 0.0002666
** Name: Preload-RV Type: Fluid cavity pressure
*Boundary, amplitude=Preload
RV-RP, 8, 8, 0.0002666
** Name: Preload-SVC Type: Fluid cavity pressure
*Boundary, amplitude=Preload
Superior_Vena_Cava-1.CAV-RP, 8, 8, 0.0002666
** Name: Preload-Venous-Comp Type: Fluid cavity pressure
*Boundary, amplitude=Preload
Venous_Compliance-1.RP, 8, 8, 0.0005332
**
** INTERACTIONS
**
** Interaction: CONTACT
*Contact, op=NEW
*Contact Inclusions
L_Atrium-1.CONT-1 , Pulmonary_Trunk-1.CONT-1
L_Atrium-1.CONT-2 , R_Atrium-1.CONT-1
L_Atrium-1.CONT-2 , Superior_Vena_Cava-1.CONT-1
L_Atrium-1.CONT-2 , Pulmonary_Trunk-1.CONT-2
*Contact Property Assignment
 ,  , Contact-Global
**
** OUTPUT REQUESTS
**
*Restart, write, number interval=1, time marks=NO
*Output, field, number interval=0
**
** HISTORY OUTPUT: ArterialRP
**
*Output, history, time interval=0.0003
*Node Output, nset=Arterial-RP
A1, U1, V1
**
** HISTORY OUTPUT: ArterialCONN
**
*Element Output, elset=Arterial-STIFF
CEF1, CTF1, CVF1
**
** HISTORY OUTPUT: LA
**
*Node Output, nset=L_Atrium-1.CAV-RP
CMFL, CVOL, PCAV
**
** HISTORY OUTPUT: RA
**
*Node Output, nset=R_Atrium-1.CAV-RP
CMFL, CVOL, PCAV
**
** HISTORY OUTPUT: LV
**
*Node Output, nset=LV-RP
CMFL, CVOL, PCAV
**
** HISTORY OUTPUT: PulmonaryRP
**
*Node Output, nset=Pulmonary-RP
A1, U1, V1
**
** HISTORY OUTPUT: PulmonaryCONN
**
*Element Output, elset=Pulmonary-STIFF
CEF1, CTF1, CVF1
**
** HISTORY OUTPUT: Arterial-Compliance
**
*Node Output, nset=Arterial_Compliance-1.RP
CMFL, CVOL, PCAV
**
** HISTORY OUTPUT: Pulmonary-Compliance
**
*Node Output, nset=Pulmonary_Compliance-1.RP
CMFL, CVOL, PCAV
**
** HISTORY OUTPUT: Venous-Compliance
**
*Node Output, nset=Venous_Compliance-1.RP
CMFL, CVOL, PCAV
**
** HISTORY OUTPUT: RV
**
*Node Output, nset=RV-RP
CMFL, CVOL, PCAV
**
** HISTORY OUTPUT: VenousRP
**
*Node Output, nset=Venous-RP
A1, U1, V1
**
** HISTORY OUTPUT: VenousCONN
**
*Element Output, elset=Venous-STIFF
CEF1, CTF1, CVF1
*End Step
** ----------------------------------------------------------------
**
** STEP: BEAT1
**
*Step, name=BEAT1, nlgeom=YES
Active excitation phase of cardiac cycle #1
*Dynamic, Explicit
, 0.5
*Bulk Viscosity
0.06, 1.2
*Fluid Exchange Activation
LINK-ARTERIAL-VENOUS
LINK-PULMONARY-LA
LINK-VENOUS-RA
*Fluid Exchange Activation, outflow only
LINK-LA-LV
LINK-LV-ARTERIAL
LINK-RA-RV
LINK-RV-PULMONARY
**
** BOUNDARY CONDITIONS
**
** Name: Compliance-Axial Type: Displacement/Rotation
*Boundary, op=NEW
Compliance-AXIAL, 2, 2
Compliance-AXIAL, 3, 3
Compliance-AXIAL, 4, 4
Compliance-AXIAL, 5, 5
Compliance-AXIAL, 6, 6
** Name: Compliance-Fixed Type: Symmetry/Antisymmetry/Encastre
*Boundary, op=NEW
Compliance-FIXED, ENCASTRE
** Name: Ground Type: Symmetry/Antisymmetry/Encastre
*Boundary, op=NEW
GROUND, ENCASTRE
** Name: Preload-Aortic_Arch Type: Fluid cavity pressure
*Boundary, op=NEW
** Name: Preload-Arterial-Comp Type: Fluid cavity pressure
*Boundary, op=NEW
** Name: Preload-LA Type: Fluid cavity pressure
*Boundary, op=NEW
** Name: Preload-LV Type: Fluid cavity pressure
*Boundary, op=NEW
** Name: Preload-Pulmonary-Comp Type: Fluid cavity pressure
*Boundary, op=NEW
** Name: Preload-Pulmonary_Trunk Type: Fluid cavity pressure
*Boundary, op=NEW
** Name: Preload-RA Type: Fluid cavity pressure
*Boundary, op=NEW
** Name: Preload-RV Type: Fluid cavity pressure
*Boundary, op=NEW
** Name: Preload-SVC Type: Fluid cavity pressure
*Boundary, op=NEW
** Name: Preload-Venous-Comp Type: Fluid cavity pressure
*Boundary, op=NEW
**
** PREDEFINED FIELDS
**
** Name: Aortic_Arch   Type: Temperature
*Temperature, op=NEW
Aortic_Arch-1.ALL_E, -80.
** Name: Excitation-01   Type: Temperature
*Temperature, op=NEW, file=heart-elec-coarse.odb, bstep=1
** Name: L_Atrium-Ini   Type: Temperature
*Temperature, op=NEW
** Name: Pulmonary_Trunk   Type: Temperature
*Temperature, op=NEW
Pulmonary_Trunk-1.ALL_E, -80.
** Name: R_Atrium-Ini   Type: Temperature
*Temperature, op=NEW
** Name: Superior_Vena_Cava   Type: Temperature
*Temperature, op=NEW
Superior_Vena_Cava-1.ALL_E, -80.
** Name: Ventricles-Ini   Type: Temperature
*Temperature, op=NEW
**
** OUTPUT REQUESTS
**
*Restart, write, number interval=1, time marks=NO
*Output, field, number interval=0
**
** HISTORY OUTPUT: ArterialRP
**
*Output, history, time interval=0.0005
*Node Output, nset=Arterial-RP
A1, U1, V1
**
** HISTORY OUTPUT: ArterialCONN
**
*Element Output, elset=Arterial-STIFF
CEF1, CTF1, CVF1
**
** HISTORY OUTPUT: LA
**
*Node Output, nset=L_Atrium-1.CAV-RP
CMFL, CVOL, PCAV
**
** HISTORY OUTPUT: RA
**
*Node Output, nset=R_Atrium-1.CAV-RP
CMFL, CVOL, PCAV
**
** HISTORY OUTPUT: LV
**
*Node Output, nset=LV-RP
CMFL, CVOL, PCAV
**
** HISTORY OUTPUT: PulmonaryRP
**
*Node Output, nset=Pulmonary-RP
A1, U1, V1
**
** HISTORY OUTPUT: PulmonaryCONN
**
*Element Output, elset=Pulmonary-STIFF
CEF1, CTF1, CVF1
**
** HISTORY OUTPUT: Arterial-Compliance
**
*Node Output, nset=Arterial_Compliance-1.RP
CMFL, CVOL, PCAV
**
** HISTORY OUTPUT: Pulmonary-Compliance
**
*Node Output, nset=Pulmonary_Compliance-1.RP
CMFL, CVOL, PCAV
**
** HISTORY OUTPUT: Venous-Compliance
**
*Node Output, nset=Venous_Compliance-1.RP
CMFL, CVOL, PCAV
**
** HISTORY OUTPUT: RV
**
*Node Output, nset=RV-RP
CMFL, CVOL, PCAV
**
** HISTORY OUTPUT: VenousRP
**
*Node Output, nset=Venous-RP
A1, U1, V1
**
** HISTORY OUTPUT: VenousCONN
**
*Element Output, elset=Venous-STIFF
CEF1, CTF1, CVF1
*End Step
** ----------------------------------------------------------------
**
** STEP: RECOVERY1
**
*Step, name=RECOVERY1, nlgeom=YES
Passive recovery of cardiac cycle #1
*Dynamic, Explicit
, 0.5
*Bulk Viscosity
0.06, 1.2
**
** PREDEFINED FIELDS
**
** Name: Aortic_Arch   Type: Temperature
*Temperature, op=NEW
Aortic_Arch-1.ALL_E, -80.
** Name: Excitation-01   Type: Temperature
*Temperature, op=NEW
** Name: Pulmonary_Trunk   Type: Temperature
*Temperature, op=NEW
Pulmonary_Trunk-1.ALL_E, -80.
** Name: Superior_Vena_Cava   Type: Temperature
*Temperature, op=NEW
Superior_Vena_Cava-1.ALL_E, -80.
**
** OUTPUT REQUESTS
**
*Restart, write, number interval=1, time marks=NO
*Output, field, number interval=0
**
** HISTORY OUTPUT: ArterialRP
**
*Output, history, time interval=0.0005
*Node Output, nset=Arterial-RP
A1, U1, V1
**
** HISTORY OUTPUT: ArterialCONN
**
*Element Output, elset=Arterial-STIFF
CEF1, CTF1, CVF1
**
** HISTORY OUTPUT: LA
**
*Node Output, nset=L_Atrium-1.CAV-RP
CMFL, CVOL, PCAV
**
** HISTORY OUTPUT: RA
**
*Node Output, nset=R_Atrium-1.CAV-RP
CMFL, CVOL, PCAV
**
** HISTORY OUTPUT: LV
**
*Node Output, nset=LV-RP
CMFL, CVOL, PCAV
**
** HISTORY OUTPUT: PulmonaryRP
**
*Node Output, nset=Pulmonary-RP
A1, U1, V1
**
** HISTORY OUTPUT: PulmonaryCONN
**
*Element Output, elset=Pulmonary-STIFF
CEF1, CTF1, CVF1
**
** HISTORY OUTPUT: Arterial-Compliance
**
*Node Output, nset=Arterial_Compliance-1.RP
CMFL, CVOL, PCAV
**
** HISTORY OUTPUT: Pulmonary-Compliance
**
*Node Output, nset=Pulmonary_Compliance-1.RP
CMFL, CVOL, PCAV
**
** HISTORY OUTPUT: Venous-Compliance
**
*Node Output, nset=Venous_Compliance-1.RP
CMFL, CVOL, PCAV
**
** HISTORY OUTPUT: RV
**
*Node Output, nset=RV-RP
CMFL, CVOL, PCAV
**
** HISTORY OUTPUT: VenousRP
**
*Node Output, nset=Venous-RP
A1, U1, V1
**
** HISTORY OUTPUT: VenousCONN
**
*Element Output, elset=Venous-STIFF
CEF1, CTF1, CVF1
*End Step
** ----------------------------------------------------------------
**
** STEP: BEAT2
**
*Step, name=BEAT2, nlgeom=YES
Active excitation phase of cardiac cycle #2
*Dynamic, Explicit
, 0.5
*Bulk Viscosity
0.06, 1.2
**
** PREDEFINED FIELDS
**
** Name: Excitation-02   Type: Temperature
*Temperature, file=heart-elec-coarse.odb, bstep=1
**
** OUTPUT REQUESTS
**
*Restart, write, number interval=1, time marks=NO
*Output, field, number interval=0
**
** HISTORY OUTPUT: ArterialRP
**
*Output, history, time interval=0.0005
*Node Output, nset=Arterial-RP
A1, U1, V1
**
** HISTORY OUTPUT: ArterialCONN
**
*Element Output, elset=Arterial-STIFF
CEF1, CTF1, CVF1
**
** HISTORY OUTPUT: LA
**
*Node Output, nset=L_Atrium-1.CAV-RP
CMFL, CVOL, PCAV
**
** HISTORY OUTPUT: RA
**
*Node Output, nset=R_Atrium-1.CAV-RP
CMFL, CVOL, PCAV
**
** HISTORY OUTPUT: LV
**
*Node Output, nset=LV-RP
CMFL, CVOL, PCAV
**
** HISTORY OUTPUT: PulmonaryRP
**
*Node Output, nset=Pulmonary-RP
A1, U1, V1
**
** HISTORY OUTPUT: PulmonaryCONN
**
*Element Output, elset=Pulmonary-STIFF
CEF1, CTF1, CVF1
**
** HISTORY OUTPUT: Arterial-Compliance
**
*Node Output, nset=Arterial_Compliance-1.RP
CMFL, CVOL, PCAV
**
** HISTORY OUTPUT: Pulmonary-Compliance
**
*Node Output, nset=Pulmonary_Compliance-1.RP
CMFL, CVOL, PCAV
**
** HISTORY OUTPUT: Venous-Compliance
**
*Node Output, nset=Venous_Compliance-1.RP
CMFL, CVOL, PCAV
**
** HISTORY OUTPUT: RV
**
*Node Output, nset=RV-RP
CMFL, CVOL, PCAV
**
** HISTORY OUTPUT: VenousRP
**
*Node Output, nset=Venous-RP
A1, U1, V1
**
** HISTORY OUTPUT: VenousCONN
**
*Element Output, elset=Venous-STIFF
CEF1, CTF1, CVF1
*End Step
** ----------------------------------------------------------------
**
** STEP: RECOVERY2
**
*Step, name=RECOVERY2, nlgeom=YES
Passive recovery of cardiac cycle #2
*Dynamic, Explicit
, 0.5
*Bulk Viscosity
0.06, 1.2
**
** PREDEFINED FIELDS
**
** Name: Aortic_Arch   Type: Temperature
*Temperature, op=NEW
Aortic_Arch-1.ALL_E, -80.
** Name: Excitation-02   Type: Temperature
*Temperature, op=NEW
** Name: Pulmonary_Trunk   Type: Temperature
*Temperature, op=NEW
Pulmonary_Trunk-1.ALL_E, -80.
** Name: Superior_Vena_Cava   Type: Temperature
*Temperature, op=NEW
Superior_Vena_Cava-1.ALL_E, -80.
**
** OUTPUT REQUESTS
**
*Restart, write, number interval=1, time marks=NO
*Output, field, number interval=0
**
** HISTORY OUTPUT: ArterialRP
**
*Output, history, time interval=0.0005
*Node Output, nset=Arterial-RP
A1, U1, V1
**
** HISTORY OUTPUT: ArterialCONN
**
*Element Output, elset=Arterial-STIFF
CEF1, CTF1, CVF1
**
** HISTORY OUTPUT: LA
**
*Node Output, nset=L_Atrium-1.CAV-RP
CMFL, CVOL, PCAV
**
** HISTORY OUTPUT: RA
**
*Node Output, nset=R_Atrium-1.CAV-RP
CMFL, CVOL, PCAV
**
** HISTORY OUTPUT: LV
**
*Node Output, nset=LV-RP
CMFL, CVOL, PCAV
**
** HISTORY OUTPUT: PulmonaryRP
**
*Node Output, nset=Pulmonary-RP
A1, U1, V1
**
** HISTORY OUTPUT: PulmonaryCONN
**
*Element Output, elset=Pulmonary-STIFF
CEF1, CTF1, CVF1
**
** HISTORY OUTPUT: Arterial-Compliance
**
*Node Output, nset=Arterial_Compliance-1.RP
CMFL, CVOL, PCAV
**
** HISTORY OUTPUT: Pulmonary-Compliance
**
*Node Output, nset=Pulmonary_Compliance-1.RP
CMFL, CVOL, PCAV
**
** HISTORY OUTPUT: Venous-Compliance
**
*Node Output, nset=Venous_Compliance-1.RP
CMFL, CVOL, PCAV
**
** HISTORY OUTPUT: RV
**
*Node Output, nset=RV-RP
CMFL, CVOL, PCAV
**
** HISTORY OUTPUT: VenousRP
**
*Node Output, nset=Venous-RP
A1, U1, V1
**
** HISTORY OUTPUT: VenousCONN
**
*Element Output, elset=Venous-STIFF
CEF1, CTF1, CVF1
*End Step
** ----------------------------------------------------------------
**
** STEP: BEAT3
**
*Step, name=BEAT3, nlgeom=YES
Active excitation phase of cardiac cycle #3
*Dynamic, Explicit
, 0.5
*Bulk Viscosity
0.06, 1.2
**
** PREDEFINED FIELDS
**
** Name: Excitation-03   Type: Temperature
*Temperature, file=heart-elec-coarse.odb, bstep=1
**
** OUTPUT REQUESTS
**
*Restart, write, number interval=1, time marks=NO
*Output, field, number interval=0
**
** HISTORY OUTPUT: ArterialRP
**
*Output, history, time interval=0.0005
*Node Output, nset=Arterial-RP
A1, U1, V1
**
** HISTORY OUTPUT: ArterialCONN
**
*Element Output, elset=Arterial-STIFF
CEF1, CTF1, CVF1
**
** HISTORY OUTPUT: LA
**
*Node Output, nset=L_Atrium-1.CAV-RP
CMFL, CVOL, PCAV
**
** HISTORY OUTPUT: RA
**
*Node Output, nset=R_Atrium-1.CAV-RP
CMFL, CVOL, PCAV
**
** HISTORY OUTPUT: LV
**
*Node Output, nset=LV-RP
CMFL, CVOL, PCAV
**
** HISTORY OUTPUT: PulmonaryRP
**
*Node Output, nset=Pulmonary-RP
A1, U1, V1
**
** HISTORY OUTPUT: PulmonaryCONN
**
*Element Output, elset=Pulmonary-STIFF
CEF1, CTF1, CVF1
**
** HISTORY OUTPUT: Arterial-Compliance
**
*Node Output, nset=Arterial_Compliance-1.RP
CMFL, CVOL, PCAV
**
** HISTORY OUTPUT: Pulmonary-Compliance
**
*Node Output, nset=Pulmonary_Compliance-1.RP
CMFL, CVOL, PCAV
**
** HISTORY OUTPUT: Venous-Compliance
**
*Node Output, nset=Venous_Compliance-1.RP
CMFL, CVOL, PCAV
**
** HISTORY OUTPUT: RV
**
*Node Output, nset=RV-RP
CMFL, CVOL, PCAV
**
** HISTORY OUTPUT: VenousRP
**
*Node Output, nset=Venous-RP
A1, U1, V1
**
** HISTORY OUTPUT: VenousCONN
**
*Element Output, elset=Venous-STIFF
CEF1, CTF1, CVF1
*End Step
** ----------------------------------------------------------------
**
** STEP: RECOVERY3
**
*Step, name=RECOVERY3, nlgeom=YES
Passive recovery of cardiac cycle #3
*Dynamic, Explicit
, 0.5
*Bulk Viscosity
0.06, 1.2
**
** PREDEFINED FIELDS
**
** Name: Aortic_Arch   Type: Temperature
*Temperature, op=NEW
Aortic_Arch-1.ALL_E, -80.
** Name: Excitation-03   Type: Temperature
*Temperature, op=NEW
** Name: Pulmonary_Trunk   Type: Temperature
*Temperature, op=NEW
Pulmonary_Trunk-1.ALL_E, -80.
** Name: Superior_Vena_Cava   Type: Temperature
*Temperature, op=NEW
Superior_Vena_Cava-1.ALL_E, -80.
**
** OUTPUT REQUESTS
**
*Restart, write, number interval=1, time marks=NO
*Output, field, number interval=0
**
** HISTORY OUTPUT: ArterialRP
**
*Output, history, time interval=0.0005
*Node Output, nset=Arterial-RP
A1, U1, V1
**
** HISTORY OUTPUT: ArterialCONN
**
*Element Output, elset=Arterial-STIFF
CEF1, CTF1, CVF1
**
** HISTORY OUTPUT: LA
**
*Node Output, nset=L_Atrium-1.CAV-RP
CMFL, CVOL, PCAV
**
** HISTORY OUTPUT: RA
**
*Node Output, nset=R_Atrium-1.CAV-RP
CMFL, CVOL, PCAV
**
** HISTORY OUTPUT: LV
**
*Node Output, nset=LV-RP
CMFL, CVOL, PCAV
**
** HISTORY OUTPUT: PulmonaryRP
**
*Node Output, nset=Pulmonary-RP
A1, U1, V1
**
** HISTORY OUTPUT: PulmonaryCONN
**
*Element Output, elset=Pulmonary-STIFF
CEF1, CTF1, CVF1
**
** HISTORY OUTPUT: Arterial-Compliance
**
*Node Output, nset=Arterial_Compliance-1.RP
CMFL, CVOL, PCAV
**
** HISTORY OUTPUT: Pulmonary-Compliance
**
*Node Output, nset=Pulmonary_Compliance-1.RP
CMFL, CVOL, PCAV
**
** HISTORY OUTPUT: Venous-Compliance
**
*Node Output, nset=Venous_Compliance-1.RP
CMFL, CVOL, PCAV
**
** HISTORY OUTPUT: RV
**
*Node Output, nset=RV-RP
CMFL, CVOL, PCAV
**
** HISTORY OUTPUT: VenousRP
**
*Node Output, nset=Venous-RP
A1, U1, V1
**
** HISTORY OUTPUT: VenousCONN
**
*Element Output, elset=Venous-STIFF
CEF1, CTF1, CVF1
*End Step
